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/batch
! ANSYS input file written by Workbench version 2026 R1
! File used for geometry attach: <PROJECT_ROOT>\10_Parametric_Study\Structural_Cases\S3_LC2_INTERMEDIATE\Project\S3_LC2_INTERMEDIATE_files\dp0\Geom\DM\Geom.scdocx
/title,S3_LC2_INTERMEDIATE--S3_LC2_Intermediate_Clamped_Pinned
/com,--- Data in consistent MKS units. See Solving Units in the help system for more information.
/units,MKS
/prep7
! Turn off shape checking because checks already performed inside WB mesher.
! See help system for more information.
SHPP,OFF,,NOWARN
etcon,set             ! allow ANSYS to choose best KEYOP's for 180x elements, resets any applicable keyopt to MAPDL defaults
/com,*********** Send User Defined Coordinate System(s) ***********
local,12,1,0.,0.,0.,0.,0.,0.
csys,0
/com,*********** Nodes for the whole assembly ***********
nblock,3,,119077
-1
/com,*********** Nodes for all Remote Points ***********
nblock,3
-1
/com,*********** Elements for Body 1 'SOLID_DOMAIN' ***********
et,1,186
keyo,1,2,1          ! set full integration on SOLID186
MAT,1 $ TYPE,1 $ REAL,1 $ SECNUM,1 $ ESYS,0    ! ELEMNODES = 20
eblock,21,COMPACT,,23400
-1
secnum,1    ! reset the section ID to default
toffst,273.15,      ! Temperature offset from absolute zero
/com,*********** Set Reference Temperature ***********
tref,26.85
/com,*********** Send Materials ***********
Temperature = 'TEMP' ! Temperature
MP,DENS,1,8190,	! kg m^-3
MPTEMP,,,,,,,,
MPTEMP,1,20
MPTEMP,2,100
MPTEMP,3,200
MPTEMP,4,300
MPTEMP,5,400
MPDATA,EX,1, ,204000000000,199000000000,193000000000,187000000000,180000000000,	! Pa
MPTEMP,,,,,,,,
MPTEMP,,,,,,,,
MPTEMP,1,20
MPTEMP,2,100
MPTEMP,3,200
MPTEMP,4,300
MPTEMP,5,400
MPDATA,NUXY,1, ,0.294,0.294,0.294,0.294,0.294,
MPTEMP,,,,,,,,
MPTEMP,,,,,,,,
MPTEMP,1,93.33
MPTEMP,2,204.44
MPTEMP,3,315.56
MPTEMP,4,426.67
MPTEMP,5,537.78
MPDATA,ALPX,1, ,1.28e-05,1.33e-05,1.39e-05,1.42e-05,1.48e-05,	! C^-1
MPTEMP,,,,,,,,
MPAMOD,1,21.11,	! C
MPTEMP,,,,,,,,
MPTEMP,1,20
MPTEMP,2,100
MPTEMP,3,200
MPTEMP,4,300
MPTEMP,5,400
MPDATA,KXX,1, ,11.5,12.1,13.5,15.2,17.1,	! W m^-1 C^-1
MPTEMP,,,,,,,,

!************************* Model Summary ********************
! SOLID_DOMAIN,	Inconel_718_Re_analysis,	matid,	1
!************************* End Model Summary ********************
/com,*********** Send Named Selection as Element Component ***********
esel,s,type,,1
cm,SOLID_DOMAIN,elem
esel,all
/com,*********** Send Named Selection as Node Component ***********
CMBLOCK,FLUID_WALL,NODE,        4
/com,*********** Send Named Selection as Node Component ***********
CMBLOCK,FLUID_SOLID_INTERFACE,NODE,        4
/com,*********** Send Named Selection as Node Component ***********
CMBLOCK,SOLID_INNER_INTERFACE,NODE,        4
/com,*********** Send Named Selection as Node Component ***********
CMBLOCK,HEATED_OUTER_WALL,NODE,        8
/com,*********** Send Named Selection as Node Component ***********
CMBLOCK,SOLID_INLET_END,NODE,       74
/com,*********** Send Named Selection as Node Component ***********
CMBLOCK,SOLID_OUTLET_END,NODE,       22
/com,*********** Send Named Selection as Node Component ***********
CMBLOCK,STRUCTURAL_SUPPORT,NODE,       74
CMBLOCK,NS_LC1_SUPPORT_3NODES_INLET_OUTE,NODE,        3
CMBLOCK,NS_LC2_HOOP_3NODES_MIDSPAN_OUTER,NODE,        3
/com,*********** Create Displacement Components For Use In Future MSUP or Multistage Analysis ******
CMBLOCK,_CM295_DISP,NODE,       74
/com,******* Constant Zero Displacement Y *******
CMBLOCK,_DISPZEROUY,NODE,       74
cmsel,s,_DISPZEROUY
d,all,uy,0
nsel,all
/com,******* Constant Zero Displacement Z *******
CMBLOCK,_DISPZEROUZ,NODE,       74
cmsel,s,_DISPZEROUZ
d,all,uz,0
nsel,all
/com,*********** Node Rotations ***********
nmod,18721,,,,-180.,0.,0.
nmod,18722,,,,-180.,0.,0.
nmod,18723,,,,-180.,0.,0.
nmod,18724,,,,-180.,0.,0.
nmod,18725,,,,170.,0.,0.
nmod,18726,,,,170.,0.,0.
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nmod,89602,,,,175.,0.,0.
/com,*********** Create Remote Point "Internal Remote Point" ***********
! -------- Remote Point Used by "S3_OUTLET_PILOT_Ux0_Uy0_Uz0_ROT_FREE_DEFORMABLE" --------
*set,tid,3
*set,cid,2
et,cid,174
et,tid,170
keyo,tid,2,1               ! Don't fix the pilot node
keyo,tid,4,111111
keyo,cid,12,5              ! Bonded Contact
keyo,cid,4,1               ! Deformable RBE3 style load
keyo,cid,2,2               ! MPC style contact
MAT,2 $ TYPE,2 $ REAL,2 $ SECNUM,2 $ ESYS,0    ! ELEMNODES = 8
eblock,21,COMPACT,,180
-1
secnum,1    ! reset the section ID to default
*set,_npilot,108253
_npilot298=_npilot
type,tid
mat ,cid
real,cid
tshape,pilo
en,33302,_npilot
tshape
/com,*********** Construct Remote Displacement ***********

/COM,*** Create a component for all remote displacements ***
CMBLOCK,REMOTEDISPALL,NODE,        1

fini
/com,****************************************************************************
/com,*************************    SOLUTION       ********************************
/com,****************************************************************************
/solu
antype,0                   ! static analysis
_thickRatio=  1     ! Ratio of thick parts in the model
eqsl,sparse,,,,,1
cntr,print,1               ! print out contact info and also make no initial contact an error
nldiag,cont,iter           ! print out contact info each equilibrium iteration
rescontrol,linear,last           ! Turn on restart files due to future eigen analysis intent
/com,****************************************************
/com,******************* SOLVE FOR LS 1 OF 1 ****************
d,108253,ux,0.
d,108253,uy,0.
d,108253,uz,0.
/com,*********** Create Imported Load "Imported_Body_Temperature_CFD" ***********
bfblock,2,temp,108252,108252,0
bf,end,loc,-1,
nsub,1,1,1
time,1.
outres,erase
outres,all,none
outres,nsol,all,
outres,rsol,all
outres,eangl,all
outres,etmp,all
outres,veng,all
outres,strs,all,
outres,epel,all,
outres,eppl,all,
outres,epth,all,
outres,cont,all,
! *********** WB SOLVE COMMAND ***********
! check interactive state
*get,ANSINTER_,active,,int
*if,ANSINTER_,ne,0,then
/eof
*endif
solve
/com *************** Write FE CONNECTORS *********
CEWRITE,file,ce,,INTE
/com,****************************************************
/com,*************** FINISHED SOLVE FOR LS 1 *************
fini
*get,_NSOLTHREADS,active,0,ntfs
*get,_NSOLPROCESSES,active,0,npfs
/post1
! ****** Begin Command Snippet ******
! =====================================================================================================
! SECTION 7B - post-processing command snippet (RE-ANALYSIS 2026, newly written).
! Inserted by mech_solve_7B.py as a Solution-level "Commands (APDL)" object in LC1, LC2 and LC2P, so MAPDL
! runs it in POST1 immediately after the solve, in the same session (the database still holds the D constraints).
! It READS results only: no load, constraint, material or temperature is changed.
! Files written in the solver working directory:
!   s7b_prrsol.txt     PRRSOL: reaction of every constrained node (nodal coordinate systems)
!   s7b_react.csv      node, x, y, z, RFX, RFY, RFZ (nodal CS; the Direct FE nodes are rotated to CS_DUCT_CYL)
!   s7b_nodal.csv      node, x, y, z, u_r, u_theta, u_z, s_r, s_theta, s_z, s1, s3, s_eqv, epel_eqv, T_used
!                      (RSYS 12 = CS_DUCT_CYL, local 12 in the input file; averaged nodal values; SI units, T in degC)
!   s7b_totals.txt     node counts and the sums of the constrained-node reactions (nodal CS) at full precision
! (FSUM is not used: Mechanical's OUTRES does not store element nodal forces - toy test, 7B.
!  Force/moment balance is computed from s7b_react.csv, with the Direct FE nodes transformed from CS_DUCT_CYL.)
! =====================================================================================================
/post1
set,last
allsel,all
rsys,0
*get,s7b_nmx,node,0,num,max
*get,s7b_ncnt,node,0,count
! ---------------- constrained nodes and reactions ----------------
nsel,s,d,ux
nsel,a,d,uy
nsel,a,d,uz
*get,s7b_nrc,node,0,count
/output,s7b_prrsol,txt
prrsol
/output
nsel,s,d,ux
nsel,a,d,uy
nsel,a,d,uz
*del,s7b_m,,nopr
*del,s7b_r,,nopr
*dim,s7b_m,array,s7b_nmx
*dim,s7b_r,array,s7b_nmx,7
*vget,s7b_m(1),node,1,nsel
*vfill,s7b_r(1,1),ramp,1,1
*vget,s7b_r(1,2),node,1,loc,x
*vget,s7b_r(1,3),node,1,loc,y
*vget,s7b_r(1,4),node,1,loc,z
*vget,s7b_r(1,5),node,1,rf,fx
*vget,s7b_r(1,6),node,1,rf,fy
*vget,s7b_r(1,7),node,1,rf,fz
*cfopen,s7b_react,csv
*vwrite
('node,x_m,y_m,z_m,RFX_nodalCS_N,RFY_nodalCS_N,RFZ_nodalCS_N')
*vmask,s7b_m(1)
*vwrite,s7b_r(1,1),s7b_r(1,2),s7b_r(1,3),s7b_r(1,4),s7b_r(1,5),s7b_r(1,6),s7b_r(1,7)
(F10.0,6(',',E22.14))
*cfclos
*vmask,s7b_m(1)
*vscfun,s7b_fx,sum,s7b_r(1,5)
*vmask,s7b_m(1)
*vscfun,s7b_fy,sum,s7b_r(1,6)
*vmask,s7b_m(1)
*vscfun,s7b_fz,sum,s7b_r(1,7)
! ---------------- full nodal table in CS_DUCT_CYL ----------------
allsel,all
rsys,12
*del,s7b_a,,nopr
*dim,s7b_a,array,s7b_nmx,15
*vget,s7b_m(1),node,1,nsel
*vfill,s7b_a(1,1),ramp,1,1
*vget,s7b_a(1,2),node,1,loc,x
*vget,s7b_a(1,3),node,1,loc,y
*vget,s7b_a(1,4),node,1,loc,z
*vget,s7b_a(1,5),node,1,u,x
*vget,s7b_a(1,6),node,1,u,y
*vget,s7b_a(1,7),node,1,u,z
*vget,s7b_a(1,8),node,1,s,x
*vget,s7b_a(1,9),node,1,s,y
*vget,s7b_a(1,10),node,1,s,z
*vget,s7b_a(1,11),node,1,s,1
*vget,s7b_a(1,12),node,1,s,3
*vget,s7b_a(1,13),node,1,s,eqv
*vget,s7b_a(1,14),node,1,epel,eqv
*vget,s7b_a(1,15),node,1,bfe,temp
*cfopen,s7b_nodal,csv
*vwrite
('node,x_m,y_m,z_m,u_r_m,u_t_m,u_z_m,s_r_Pa,s_t_Pa,s_z_Pa,s1_Pa,s3_Pa,seqv_Pa,epel_eqv,T_used_C')
*vmask,s7b_m(1)
*vwrite,s7b_a(1,1),s7b_a(1,2),s7b_a(1,3),s7b_a(1,4),s7b_a(1,5),s7b_a(1,6),s7b_a(1,7),s7b_a(1,8),s7b_a(1,9),s7b_a(1,10),s7b_a(1,11),s7b_a(1,12),s7b_a(1,13),s7b_a(1,14),s7b_a(1,15)
(F10.0,14(',',E17.9))
*cfclos
*cfopen,s7b_totals,txt
*vwrite,s7b_ncnt,s7b_nmx,s7b_nrc
('nodes ',F10.0,' max_node ',F10.0,' constrained_nodes ',F10.0)
*vwrite,s7b_fx,s7b_fy,s7b_fz
('SUM_RF_nodalCS_N ',3E24.15)
*cfclos
rsys,0
allsel,all

! ****** End   Command Snippet ******
fini
